// SBML level 2 version 2

model LotkaVolterra_tranport()

  // Compartments:
  compartment cytoplasm = 5;
  compartment nucleus in cytoplasm = 1;

  // Species:
  species $X in nucleus = 1/nucleus;
  species Y1n in nucleus = 1/nucleus;
  species Y1c in nucleus = 0;
  species Y2 in cytoplasm = 1/cytoplasm;

  // Parameters:
  k1 = 2500;
  k2 = 2500;
  kT = 25000;
  k3 = 2500;

  // Reactions:
  production: $X + Y1n => Y1n + Y1n; nucleus*k1*X*Y1n;
  transport: Y1n -> Y1c; cytoplasm*kT*(Y1n - Y1c);
  transformation: Y1c + Y2 => Y2 + Y2; cytoplasm*k2*Y1c*Y2;
  degradation: Y2 => ; cytoplasm*k3*Y2;
end
