// SBML level 2 version \changed{3}

model facilitated_ca_diffusion()

  // Compartments:
  compartment Extracellular = 1;
  compartment PlasmaMembrane in Extracellular = 1;  // 2-D
  compartment Cytosol in PlasmaMembrane = 1;

  // Species:
  species CaBPB_C in Cytosol = 47.17;
  species B_C in Cytosol = 396.04;
  species CaB_C in Cytosol = 3.96;
  species Ca_C in Cytosol = 0.1;
  species Ca_EC in Extracellular = 1000;
  species CaCh_PM in PlasmaMembrane = 1;
  species CaPump_PM in PlasmaMembrane = 1;
  species CaBP_C in Cytosol = 202.83;

  // Reactions:
  // (((Kf_CalciumCalbindin_BoundCytosol * CaBP_C) * Ca_C) - (Kr_CalciumCalbindin_BoundCytosol * CaBPB_C))
  CalciumCalbindin_gt_BoundCytosol: CaBP_C + Ca_C -> CaBPB_C; Cytosol*(Kf_CalciumCalbindin_BoundCytosol*CaBP_C*Ca_C - Kr_CalciumCalbindin_BoundCytosol*CaBPB_C);  // fast
    Kf_CalciumCalbindin_BoundCytosol = 20; Kr_CalciumCalbindin_BoundCytosol = 8.6;
  // (((Kf_CalciumBuffer_BoundCytosol * Ca_C) * B_C) - (Kr_CalciumBuffer_BoundCytosol * CaB_C))
  CalciumBuffer_gt_BoundCytosol: Ca_C + B_C -> CaB_C; Cytosol*(Kf_CalciumBuffer_BoundCytosol*Ca_C*B_C - Kr_CalciumBuffer_BoundCytosol*CaB_C);  // fast
    Kf_CalciumBuffer_BoundCytosol = 0.1; Kr_CalciumBuffer_BoundCytosol = 1;
  // ((Vmax * kP * ((Ca_C - Ca_Rest) / (Ca_C + kP)) / (Ca_Rest + kP)) * CaPump_PM)
  Ca_Pump: Ca_C -> Ca_EC; PlasmaMembrane*(Vmax*kP*CaPump_PM*(Ca_C - Ca_Rest)/((Ca_C + kP)*(Ca_Rest + kP)));  // modifiers: CaPump_PM
    Vmax = -4000; kP = 0.25; Ca_Rest = 0.1;
  // (J0 * Kc * (Ca_EC - Ca_C) / (Kc + Ca_C) * CaCh_PM)
  Ca_channel: Ca_EC -> Ca_C; PlasmaMembrane*(CaCh_PM*J0*Kc*(Ca_EC - Ca_C)/(Kc + Ca_C));  // modifiers: CaCh_PM
    J0 = 0.014; Kc = 0.5;

  // Unit definitions:
  unit substance = 1e-6 mole;
  unit area = (1e-6 metre)^2;
  unit per_second = 1 / second;
  unit litre_per_mole_per_second = litre / (1e-6 mole * second);
  unit subs_per_vol = 1e-6 mole / litre;
end
