// SBML level 3 version 1

model cell_model()

  // Compartments:
  compartment cell;

  // Species:
  species $mat in cell_compartment = 1/cell_compartment;
  species mRNA in cell_compartment = 0;
  species $waste in cell = 1/cell;
  species ubiq in cell = 0;
  species p in cell;
  species pTot in cell;

  // Parameters:
  kmu = 0.1;

  // Reactions:
  ubiq2waste: ubiq -> $waste; vmu*ubiq;
    vmu = 0.1;
  mRNA2waste: mRNA -> $waste; kdm*mRNA;
    kdm = 0.1;
  p2waste: p -> $waste; kdp*p;
    kdp = 0.1;
  mat2ubiq: $mat -> ubiq; vi;
    vi = 0.1;
  mat2p: $mat -> p; ks*mRNA/(kmu + mRNA);  // modifiers: mRNA
    ks = 0.1;
  local_mat2mRNA: $mat -> mRNA; kt*ubiq/(kmu + ubiq);  // modifiers: ubiq
    kt = 0.1;
  neighbour_mat2mRNA: $mat -> mRNA; kr*pTot/add(kmr, pTot);  // modifiers: p
    kr = 0.1; kmr = 0.07;
end
