// SBML level 3 version 1

model main()
  // model units - time: second, extent: mole
  // conversionFactor convertToItem

  // Compartments:
  compartment comp = 1e-14 litre;

  // Species:
  species ES in comp = 0;  // substance in item
  species P in comp = 0;  // substance in gram; conversionFactor convertToGram
  species S in comp = 1e-17/comp;  // substance in item
  species E in comp = 5e-16/comp;  // substance in item

  // Parameters:
  convertToItem = 1.7e-24 item_per_mole;
  convertToGram = 180 gram_per_mole;
  c_e = 6e23 mole_per_item;
  c_s = 6e23 mole_per_item;
  c_es = 6e23 mole_per_item;

  // Reactions:
  veq: E + S -> ES; comp*(kon*E*c_e*S*c_s - koff*ES*c_es);
    kon = 1000000 litre_per_mole_second; koff = 0.2 per_second;
  vcat: ES => E + P; comp*kcat*ES*c_es;
    kcat = 0.1 per_second;

  // Unit definitions:
  unit per_second = 1 / second;
  unit litre_per_mole_second = litre / (mole * second);
  unit gram_per_mole = gram / mole;
  unit item_per_mole = item / mole;
  unit mole_per_item = mole / item;
end
