// SBML level 3 version 1

model main()
  // model units - time: second, extent: mole
  // conversionFactor convertToMilliMole

  // Compartments:
  compartment comp = 1e-14 litre;

  // Species:
  species ES in comp = 0;  // substance in milliMole
  species P in comp = 0;  // substance in gram; conversionFactor convertToGram
  species S in comp = 1e-17/comp;  // substance in milliMole
  species E in comp = 5e-18/comp;  // substance in milliMole

  // Parameters:
  convertToMilliMole = 1000 millimole_per_mole;
  convertToGram = 180 gram_per_mole;

  // Reactions:
  veq: E + S -> ES; comp*(kon*E*S - koff*ES);
    kon = 1 mole_litre_per_millimole_sq_second; koff = 0.0002 mole_per_millimole_second;
  vcat: ES => E + P; comp*kcat*ES;
    kcat = 0.0001 mole_per_millimole_second;

  // Unit definitions:
  unit mole_per_millimole_second = mole / (1e-3 mole * second);
  unit mole_litre_per_millimole_sq_second = mole * litre / ((1e-3 mole)^2 * second);
  unit milliMole = 1e-3 mole;
  unit gram_per_mole = gram / mole;
  unit millimole_per_mole = 1e-3 mole / mole;
end
