// SBML level 3 version 1

model EnzymaticReaction()

  // Compartments:
  compartment cytosol = 1e-14 litre;

  // Species:
  species ES in cytosol = 0;  // substance in mole
  species P in cytosol = 0;  // substance in mole
  species S in cytosol = 1e-20/cytosol;  // substance in mole
  species E in cytosol = 5e-21/cytosol;  // substance in mole

  // Reactions:
  veq: E + S -> ES; cytosol*(kon*E*S - koff*ES);
    kon = 1000000 litre_per_mole_per_second; koff = 0.2 per_second;
  vcat: ES => E + P; cytosol*kcat*ES;
    kcat = 0.1 per_second;

  // Unit definitions:
  unit per_second = 1 / second;
  unit litre_per_mole_per_second = litre / (mole * second);
end
