// SBML level 3 version 1

model cell()
  // model units - time: time

  // Compartments:
  compartment compartment = 1 volume;

  // Species:
  species $Dose1 in compartment;
  species $Dose2 in compartment;
  species $OUT in compartment = 0;
  species A in compartment = 0;
  species B in compartment = 0;

  // Parameters:
  k1 = 0.1;
  k2 = 0.1;
  k3 = 0.1;

  // Assignment rules:
  Dose1 := piecewise(2, time < 1, 0);
  Dose2 := piecewise(1.5, (time > 5) && (time < 6), 0);

  // Reactions:
  _J0: $Dose1 => A; k1*Dose1;
  _J1: $Dose2 => A; k1*Dose2;
  _J2: A => B; k2*A;
  _J3: B => $OUT; k3*B;

  // Unit definitions:
  unit volume = litre;
  unit substance = mole;
  unit time = second;
end
